λ := 10^-4
t := 0, 10 .. 100000
p(t) := e^(-λ*t)
P(t) := p(t)^5
P1(t, n, m) := 1 - (1 - P(t)^n)^m
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P3(t, m, n) := (1 - (1 - P(t))^m)^n
P31(t) := P3(t, 3, 6)
P4(t, m) := 1 - (1 - P(t))^m
P5(t) := P(t)^5 + 5*P(t)^4*(1 - P(t)) + 8*P(t)^3*(1 - P(t))^2 + 2*P(t)^2*(1 - P(t))^3
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