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λ1 := 10^-4
λ2 := 10^-4
μ1 := 1
μ21 := 1
μ22 := 0.3
Given
P0 + P1 + P2 + P3 == 1
-(4*λ1 + λ2)*P0 + μ22*P2 + μ1*P3 == 0
-μ21*P1 + λ2*P0 == 0
-(λ1 + μ22)*P2 + μ21*P1 + μ1*P4 == 0
-μ1*P3 + 4*λ1*P0 == 0
-μ1*P4 + λ1*P2 == 0
Find(P0, P1, P2, P3, P4) → [0.999167360533; 9.99167360533e-5; 0.000333055786844; 0.000399666944213; 3.33055786844e-8]
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λ1 := 10^-4
λ2 := 10^-4
μ1 := 1
μ21 := 1
μ22 := 0.3
Given
P0 + P1 + P2 + P3 + P4 + P5 + P6 + P7 + P8 + P9 + P10 == 1
-(4*λ1 + λ2)*P0 + μ1*P1 + μ22*P9 == 0
-(3*λ1 + λ2 + μ1)*P1 + 4*λ1*P0 + μ1*P2 == 0
-(2*λ1 + λ2 + μ1)*P2 + 3*λ1*P1 + μ1*P3 == 0
-(λ1 + λ2 + μ1)*P3 + 2*λ1*P2 + μ1*P4 == 0
-μ1*P4 + λ1*P3 == 0
-μ21*P5 + λ2*P0 + μ1*P6 + λ2*P9 == 0
-μ1*P6 + λ2*P1 + μ1*P7 == 0
-μ1*P7 + λ2*P2 + μ1*P8 == 0
-μ1*P8 + λ2*P3 == 0
-(μ22 + λ1 + λ2)*P9 + μ21*P5 + μ1*P10 == 0
-μ1*P10 + λ1*P9 == 0
Find(P0, P1, P2, P3, P4, P5, P6, P7, P8, P9, P10) → [0.999167001059; 0.000399626825751; 1.19876057722e-7; 2.3972814263e-11; 2.3972814263e-15; 9.99899936701e-5; 3.99746725782e-8; 1.19900030537e-11; 2.3972814263e-15; 0.000333188915928; 3.33188915928e-8]
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Given
λ1 := 10^-4
λ2 := 10^-4
μ1 := 1
μ21 := 1
μ22 := 0.3
P0 + P1 + P2 + P3 + P4 + P5 + P6 + P7 + P8 + P9 + P10 + P11 + P12 + P13 == 1
-(4*λ1 + λ2)*P0 + μ1*P1 + μ22*P9 == 0
-(3*λ1 + λ2 + μ1)*P1 + 4*λ1*P0 + μ1*P2 + μ22*P10 == 0
-(2*λ1 + λ2 + μ1)*P2 + 3*λ1*P1 + μ1*P3 + μ22*P11 == 0
-(λ1 + λ2 + μ1)*P3 + 2*λ1*P2 + μ1*P4 + μ22*P12 == 0
-μ1*P4 + λ1*P3 == 0
-μ21*P5 + λ2*P0 + λ2*P9 == 0
-μ21*P6 + λ2*P1 + λ2*P10 == 0
-μ21*P7 + λ2*P2 + λ2*P11 == 0
-μ21*P8 + λ2*P3 + λ2*P12 == 0
-(μ22 + λ1 + λ2)*P9 + μ21*P5 == 0
-(μ22 + λ1 + λ2)*P10 + μ21*P6 + λ1*P9 == 0
-(μ22 + λ1 + λ2)*P11 + μ21*P7 + λ1*P10 == 0
-(μ22 + λ1 + λ2)*P12 + μ21*P8 + λ1*P11 + μ1*P13 == 0
-μ1*P13 + λ1*P12 == 0
Find(P0, P1, P2, P3, P4, P5, P6, P7, P8, P9, P10, P11, P12, P13) → [0.999167001005; 0.000399700094871; 1.19934441816e-7; 2.39990199191e-11; 2.39990199191e-15; 9.99499945691e-5; 3.9994422842e-8; 1.20055757374e-11; 2.40474581118e-15; 0.00033294468544; 2.44133548921e-7; 1.21315558393e-10; 4.84381927706e-14; 4.84381927706e-18]
