v1 := 0.01
v2 := 0.001
n := 2
C0 := 1
C1 := 0.1
t(k) := k*v1
i := n
T(i, λ) := v1/(1 - λ*v1/i)
B1(i, λ, k) := 1 - λ*v1*e^((-1/v1 + λ/i)*t(k))/i
B2(i, λ, k) := 1 - λ*v2*e^((λ - 1/v2)*(t(k) - T(i, λ)))
B(i, λ, k) := B1(i, λ, k)*B2(i, λ, k)
B(i, λ, k) ≥ 0
L(i, λ, k) := B(i, λ, k)*C0 + (1 - B(i, λ, k))*C1
R(i, λ, k) := λ*(B(i, λ, k)*C0 + (1 - B(i, λ, k))*C1)
λ := 1, 2 .. 110
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λ := 1, 2 .. 138
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λ := 1, 2 .. 162
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