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v := 0.01
n := 10
C11 := 1
C12 := -3
C21 := 0.4
C22 := -0.6
v1 := 0.002
t1 := 2*v
t2 := 4*v
T(λ) := v/(1 - λ*v/n)
B1(λ) := 1 - λ*v*e^((λ/n - 1/v)*t1)/n
B2(λ) := 1 - λ*v*e^((λ/n - 1/v)*t2)/n
B12(λ) := 1 - λ*v1*e^((λ/n - 1/v)*(t1 - T(λ)))
B22(λ) := 1 - λ*v1*e^((λ/n - 1/v)*(t2 - T(λ)))
A1(λ) := B1(λ)*B12(λ)
A2(λ) := B2(λ)*B22(λ)
S1(λ) := A1(λ)*C11 + (1 - A1(λ))*C12
S2(λ) := A2(λ)*C21 + (1 - A2(λ))*C22
D1(λ, α) := α*S1(λ)*λ
D2(λ, α) := (1 - α)*S2(λ)*λ
D(λ, α) := D1(λ, α) + D2(λ, α)
λ := 1, 2 .. 500
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v := 0.01
n := 10
C11 := 2
C12 := -3
C21 := 0.4
C22 := -0.6
v1 := 0.002
t1 := 2*v
t2 := 4*v
T(λ) := v/(1 - λ*v/n)
B1(λ) := 1 - λ*v*e^((λ/n - 1/v)*t1)/n
B2(λ) := 1 - λ*v*e^((λ/n - 1/v)*t2)/n
B12(λ) := 1 - λ*v1*e^((λ/n - 1/v)*(t1 - T(λ)))
B22(λ) := 1 - λ*v1*e^((λ/n - 1/v)*(t2 - T(λ)))
A1(λ) := B1(λ)*B12(λ)
A2(λ) := B2(λ)*B22(λ)
S1(λ) := A1(λ)*C11 + (1 - A1(λ))*C12
S2(λ) := A2(λ)*C21 + (1 - A2(λ))*C22
D1(λ, α) := α*S1(λ)*λ
D2(λ, α) := (1 - α)*S2(λ)*λ
D(λ, α) := D1(λ, α) + D2(λ, α)
λ := 1, 2 .. 500
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