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C01 := 1
C02 := 0.2
C11 := -1
C12 := -0.2
C21 := -2
C22 := -1
L := 1000
L0 := 100
b := 10^-4
S := 10^6
V := (L + L0)/S
P := (1 - b)^(L + L0)
α := 0.2
t1 := 2*V
t2 := 4*V
λ0(λ, K) := α*(λ*K + (1 - α))
P01(K) := 1 - (1 - P)^K
P02 := P
B2(λ, K) := 1 - λ0(λ, K)*V*e^((λ0(λ, K) - 1/V)*t2)
B1(λ, K) := 1 - λ0(λ, K)*V*e^((λ0(λ, K) - 1/V)*t1)
B10(λ, K) := 1 - (1 - B1(λ, K))^K
B20(λ, K) := B2(λ, K)
R1(λ, K) := 1 - (1 - B1(λ, K)*P)^K
I0(λ, K) := λ*(α*(R1(λ, K)*C02 + (1 - B1(λ, K)^K)*P01(K)*C11 + (1 - P01(K))*C21) + (1 - α)*(B20(λ, K)*P02*C02 + P02*(1 - B2(λ, K))*C12 + (1 - P02)*C22))
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V := (L + L0)/S
P := (1 - b)^(L + L0)
α := 0.6
t1 := 2*V
t2 := 4*V
λ0(λ, K) := α*(λ*K + (1 - α))
P01(K) := 1 - (1 - P)^K
P02 := P
B2(λ, K) := 1 - λ0(λ, K)*V*e^((λ0(λ, K) - 1/V)*t2)
B1(λ, K) := 1 - λ0(λ, K)*V*e^((λ0(λ, K) - 1/V)*t1)
B10(λ, K) := 1 - (1 - B1(λ, K))^K
B20(λ, K) := B2(λ, K)
R1(λ, K) := 1 - (1 - B1(λ, K)*P)^K
I0(λ, K) := λ*(α*(R1(λ, K)*C02 + (1 - B1(λ, K)^K)*P01(K)*C11 + (1 - P01(K))*C21) + (1 - α)*(B20(λ, K)*P02*C02 + P02*(1 - B2(λ, K))*C12 + (1 - P02)*C22))
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V := (L + L0)/S
P := (1 - b)^(L + L0)
α := 0.8
t1 := 2*V
t2 := 4*V
λ0(λ, K) := α*(λ*K + (1 - α))
P01(K) := 1 - (1 - P)^K
P02 := P
B2(λ, K) := 1 - λ0(λ, K)*V*e^((λ0(λ, K) - 1/V)*t2)
B1(λ, K) := 1 - λ0(λ, K)*V*e^((λ0(λ, K) - 1/V)*t1)
B10(λ, K) := 1 - (1 - B1(λ, K))^K
B20(λ, K) := B2(λ, K)
R1(λ, K) := 1 - (1 - B1(λ, K)*P)^K
I0(λ, K) := λ*(α*(R1(λ, K)*C02 + (1 - B1(λ, K)^K)*P01(K)*C11 + (1 - P01(K))*C21) + (1 - α)*(B20(λ, K)*P02*C02 + P02*(1 - B2(λ, K))*C12 + (1 - P02)*C22))
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