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C01 := 2
C02 := 1
C11 := -0.5
C12 := -0.3
C21 := -2
C22 := -1
L := 1000
L0 := 64
S := 10^6
b := 10^-4
n := 10
V := (L + L0)/S
B := (1 - b)^(L + L0)
t1 := 2*V
t2 := 5*V
B11(λ, α, n1) := 1 - α*λ*V/n1*e^((α*λ/n1 - 1/V)*t1)
t1 := 2*V
t2 := 5*V
B12(λ, α, n1) := 1 - λ*V/(n - n1)*e^((λ/(n - n1) - 1/V)*t1)
t1 := 2*V
t2 := 5*V
B2(λ, α, n1) := 1 - λ*V/(n - n1)*e^((λ/(n - n1) - 1/V)*t2)
I1(λ, α, n1) := B^2*((1 - (1 - B11(λ, α, n1))*(1 - B12(λ, α, n1)))*C01 + (1 - B11(λ, α, n1))*(1 - B12(λ, α, n1))*C11) + B*(1 - B)*(B11(λ, α, n1)*C01 + (1 - B11(λ, α, n1))*C11) + (1 - B)*B*(B12(λ, α, n1)*C01 + (1 - B12(λ, α, n1))*C11) + (1 - B)^2*C21
I2(λ, α, n1) := B*B2(λ, α, n1)*C02 + B*(1 - B2(λ, α, n1))*C12 + (1 - B)^2*C21
I(λ, α, n1) := λ*(α*I1(λ, α, n1) + (1 - α)*I2(λ, α, n1))
n1 := 5
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n1 := 7
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n1 := 8
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λ1 := 300
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λ1 := 1000
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λ1 := 3000
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